# OpenSim document version 40500
InverseKinematicsTool:
  time_range: -inf inf
  output_motion_file: C:\resulting\motion\file\here.mot
  marker_file: C:\path\to\your\marker_file.trc
  IKTaskSet:
    IKMarkerTask STERN: apply=true weight=1
    IKMarkerTask RFRO: apply=true weight=1
    IKMarkerTask LFRO: apply=true weight=1
    IKMarkerTask ROCC: apply=true weight=1
    IKMarkerTask LOCC: apply=true weight=1
    IKMarkerTask RSHO: apply=true weight=1
    IKMarkerTask LSHO: apply=true weight=1
