# OpenSim document version 40500
AnalyzeTool SO<cond>_<trial>:
  model_file: C:/Path/to/model_file.osim
  replace_force_set: false
  results_directory: C:/Path/to/output_directory/per_trial
  output_precision: 6
  initial_time: -inf
  final_time: inf
  solve_for_equilibrium_for_auxiliary_states: false
  maximum_number_of_integrator_steps: 20000
  maximum_integrator_step_size: 1
  minimum_integrator_step_size: 1e-8
  integrator_error_tolerance: 1e-5
  external_loads_file: C:/Path/to/external_loads_file.xml
  coordinates_file: C:/Path/to/coordinates_file.mot
  lowpass_cutoff_frequency_for_coordinates: 1
  AnalysisSet Analyses:
    StaticOptimization: start_time=-inf end_time=inf step_interval=5 in_degrees=true use_model_force_set=true
        activation_exponent=2 use_muscle_physiology=true optimizer_convergence_criterion=0.0001
        optimizer_max_iterations=100
