# OpenSim document version 40600
Model 4-mo_with-scaling:
  gravity: 0 -9.80665 0
  length_units: meters
  force_units: N
  credits:
    Andrew J. Bossert, Boise State University, Department of Mechanical and Biomedical Engineering
  publications:
    Development of an infant head-neck model to elucidate risk in inclined environments, Journal of Biomechanics, 2026
  Ground
  BodySet:
    Body spine: mass=2.827508 [kg] mass_center=(0 0 0) inertia=(0.004677857 0.005472803 0.005472803 0 0 0)
        meshes=tlspine.vtp
    Body rscapula: mass=0.04039298 mass_center=(0 0 0) inertia=(0.004185383 0.004185383 0.003133875 0 0 0)
        meshes=rscapula.vtp
    Body rclavicle: mass=0.04039298 mass_center=(0 0 0) inertia=(0.004185383 0.004185383 0.003133875 0 0 0)
        meshes=rclavicle.vtp
    Body lscapula: mass=0.04039298 mass_center=(0 0 0) inertia=(0.004185383 0.004185383 0.003133875 0 0 0)
        meshes=lscapula.vtp
    Body lclavicle: mass=0.04039298 mass_center=(0 0 0) inertia=(0.004185383 0.004185383 0.003133875 0 0 0)
        meshes=lclavicle.vtp
    Body ribcage: mass=0.04039298 mass_center=(0 0 0) inertia=(0.004764987 0.004347336 0.004764987 0 0 0)
        meshes=ribcage.vtp
    Body cerv7: mass=0.07360698 mass_center=(-0.0001022319 0.002835377 0)
        inertia=(0.0007017754 0.002655797 0.002655797 0 0 0) meshes=rotatedcerv7.vtp
    Body cerv6: mass=0.06398706 mass_center=(0.0001022319 0.002555833 0)
        inertia=(0.0007017754 0.002655797 0.002655797 0 0 0) meshes=cerv6.vtp
    Body cerv5: mass=0.05407564 mass_center=(5.111593e-5 0.002515898 0)
        inertia=(0.0007017754 0.002655797 0.002655797 0 0 0) meshes=cerv5.vtp
    Body cerv4: mass=0.05334684 mass_center=(-0.0001533478 0.002675638 0)
        inertia=(0.0007017754 0.002655797 0.002655797 0 0 0) meshes=cerv4.vtp
    Body cerv3: mass=0.05290957 mass_center=(-0.0004089274 0.002835377 0)
        inertia=(0.0007017754 0.002655797 0.002655797 0 0 0) meshes=cerv3.vtp
    Body cerv2: mass=0.07404425 mass_center=(-0.0005111593 0.002356158 0)
        inertia=(0.0007017754 0.002655797 0.002655797 0 0 0) meshes=cerv2.vtp
    Body cerv1: mass=0.05888558 mass_center=(0.01594817 0.0007587629 0)
        inertia=(0.0007017754 0.002655797 0.002655797 0 0 0) meshes=cerv1.vtp
    Body skull: mass=0.5396707 mass_center=(0.008816784 0.02559746 0)
        inertia=(0.0006502416 0.0006497015 0.0006497015 0 0 0) meshes=skull.vtp
    Body jaw: mass=0 mass_center=(0 0.025 0) inertia=(0 0 0 0 0 0) meshes=jaw.vtp
  JointSet:
    CustomJoint spine: socket_parent_frame=ground_offset socket_child_frame=spine_offset
      Coordinate gndpitch: default_value=0 range=(-3.141593 3.141593) clamped=true
      Coordinate gndroll: default_value=0 range=(-3.141593 3.141593) clamped=true
      Coordinate gndyaw: default_value=4.440892e-16 range=(-3.141593 3.141593) clamped=true
      Coordinate spine_tx: default_value=0 range=(-1 1) clamped=true
      Coordinate spine_ty: default_value=0 range=(-1 1) clamped=true
      Coordinate spine_tz: default_value=0 range=(-1 1) clamped=true
      PhysicalOffsetFrame ground_offset: socket_parent=/ground translation=(0 0 0) [meters]
      PhysicalOffsetFrame spine_offset: socket_parent=/bodyset/spine translation=(0 0 0)
      SpatialTransform:
        TransformAxis rotation1: coordinates=gndpitch axis=(0 0 1) LinearFunction(coefficients=1 0)
        TransformAxis rotation2: coordinates=gndroll axis=(1 0 0) LinearFunction(coefficients=1 0)
        TransformAxis rotation3: coordinates=gndyaw axis=(0 1 0) LinearFunction(coefficients=1 0)
        TransformAxis translation1: coordinates=spine_tx axis=(1 0 0) LinearFunction(coefficients=1 0)
        TransformAxis translation2: coordinates=spine_ty axis=(0 1 0) LinearFunction(coefficients=1 0)
        TransformAxis translation3: coordinates=spine_tz axis=(0 0 1) LinearFunction(coefficients=1 0)
    WeldJoint rscapulajnt: socket_parent_frame=spine_offset socket_child_frame=rscapula_offset
      PhysicalOffsetFrame spine_offset: socket_parent=/bodyset/spine translation=(-0.0144173 0.1427155 0.05400667)
          orientation=(0.174533 -0.296706 -0.174533) [radians]
      PhysicalOffsetFrame rscapula_offset: socket_parent=/bodyset/rscapula translation=(0 0 0)
    WeldJoint rclaviclejnt: socket_parent_frame=spine_offset socket_child_frame=rclavicle_offset
      PhysicalOffsetFrame spine_offset: socket_parent=/bodyset/spine translation=(-0.004648201 0.1320798 0.006467864)
          orientation=(0 0.139626 0)
      PhysicalOffsetFrame rclavicle_offset: socket_parent=/bodyset/rclavicle translation=(0 0 0)
    WeldJoint lscapulajnt: socket_parent_frame=spine_offset socket_child_frame=lscapula_offset
      PhysicalOffsetFrame spine_offset: socket_parent=/bodyset/spine translation=(-0.0144173 0.1427155 -0.05400667)
          orientation=(-0.174533 0.296706 -0.174533)
      PhysicalOffsetFrame lscapula_offset: socket_parent=/bodyset/lscapula translation=(0 0 0)
    WeldJoint lclaviclejnt: socket_parent_frame=spine_offset socket_child_frame=lclavicle_offset
      PhysicalOffsetFrame spine_offset: socket_parent=/bodyset/spine translation=(-0.004648201 0.1320798 -0.006467864)
          orientation=(0 -0.139626 0)
      PhysicalOffsetFrame lclavicle_offset: socket_parent=/bodyset/lclavicle translation=(0 0 0)
    WeldJoint ribcagejnt: socket_parent_frame=spine_offset socket_child_frame=ribcage_offset
      PhysicalOffsetFrame spine_offset: socket_parent=/bodyset/spine translation=(0 0 0)
      PhysicalOffsetFrame ribcage_offset: socket_parent=/bodyset/ribcage translation=(0 0 0)
    CustomJoint auxt1jnt: socket_parent_frame=spine_offset socket_child_frame=cerv7_offset
      Coordinate pitch2: default_value=0 range=(-0.5759587 0.837758) clamped=true
      Coordinate roll2: default_value=0 range=(-0.5759587 0.5759587) clamped=true
      Coordinate yaw2: default_value=0 range=(-0.4712389 0.4712389) clamped=true
      PhysicalOffsetFrame spine_offset: socket_parent=/bodyset/spine translation=(-0.01871098 0.1423216 0)
      PhysicalOffsetFrame cerv7_offset: socket_parent=/bodyset/cerv7 translation=(0.00349633 -0.002258318 0)
      SpatialTransform: axes_held_at_zero=(translation1 translation2 translation3)
        TransformAxis rotation1: coordinates=pitch2 axis=(0 0 1) LinearFunction(coefficients=1 0)
        TransformAxis rotation2: coordinates=roll2 axis=(1 0 0) LinearFunction(coefficients=1 0)
        TransformAxis rotation3: coordinates=yaw2 axis=(0 1 0) LinearFunction(coefficients=1 0)
    CustomJoint aux7jnt: socket_parent_frame=cerv7_offset socket_child_frame=cerv6_offset
      Coordinate aux7jnt_r3: default_value=0 range=(-0.5759587 0.837758) clamped=true
      Coordinate aux7jnt_r1: default_value=0 range=(-0.5759587 0.5759587) clamped=true
      Coordinate aux7jnt_r2: default_value=0 range=(-0.4712389 0.4712389) clamped=true
      PhysicalOffsetFrame cerv7_offset: socket_parent=/bodyset/cerv7 translation=(0.006775928 0.004943939 0)
      PhysicalOffsetFrame cerv6_offset: socket_parent=/bodyset/cerv6 translation=(0.00481461 -0.001623353 0)
      SpatialTransform: axes_held_at_zero=(translation1 translation2 translation3)
        TransformAxis rotation1: coordinates=aux7jnt_r3 axis=(0 0 1) LinearFunction(coefficients=1 0)
        TransformAxis rotation2: coordinates=aux7jnt_r1 axis=(1 0 0) LinearFunction(coefficients=1 0)
        TransformAxis rotation3: coordinates=aux7jnt_r2 axis=(0 1 0) LinearFunction(coefficients=1 0)
    CustomJoint aux6jnt: socket_parent_frame=cerv6_offset socket_child_frame=cerv5_offset
      Coordinate aux6jnt_r3: default_value=0 range=(-0.5759587 0.837758) clamped=true
      Coordinate aux6jnt_r1: default_value=0 range=(-0.5759587 0.5759587) clamped=true
      Coordinate aux6jnt_r2: default_value=0 range=(-0.4712389 0.4712389) clamped=true
      PhysicalOffsetFrame cerv6_offset: socket_parent=/bodyset/cerv6 translation=(0.005034919 0.003893652 0)
      PhysicalOffsetFrame cerv5_offset: socket_parent=/bodyset/cerv5 translation=(0.002898273 -0.003254693 0)
      SpatialTransform: axes_held_at_zero=(translation1 translation2 translation3)
        TransformAxis rotation1: coordinates=aux6jnt_r3 axis=(0 0 1) LinearFunction(coefficients=1 0)
        TransformAxis rotation2: coordinates=aux6jnt_r1 axis=(1 0 0) LinearFunction(coefficients=1 0)
        TransformAxis rotation3: coordinates=aux6jnt_r2 axis=(0 1 0) LinearFunction(coefficients=1 0)
    CustomJoint aux5jnt: socket_parent_frame=cerv5_offset socket_child_frame=cerv4_offset
      Coordinate aux5jnt_r3: default_value=0 range=(-0.5759587 0.837758) clamped=true
      Coordinate aux5jnt_r1: default_value=0 range=(-0.5759587 0.5759587) clamped=true
      Coordinate aux5jnt_r2: default_value=0 range=(-0.4712389 0.4712389) clamped=true
      PhysicalOffsetFrame cerv5_offset: socket_parent=/bodyset/cerv5 translation=(0.004309073 0.002975149 0)
      PhysicalOffsetFrame cerv4_offset: socket_parent=/bodyset/cerv4 translation=(0.00256602 -0.004680369 0)
      SpatialTransform: axes_held_at_zero=(translation1 translation2 translation3)
        TransformAxis rotation1: coordinates=aux5jnt_r3 axis=(0 0 1) LinearFunction(coefficients=1 0)
        TransformAxis rotation2: coordinates=aux5jnt_r1 axis=(1 0 0) LinearFunction(coefficients=1 0)
        TransformAxis rotation3: coordinates=aux5jnt_r2 axis=(0 1 0) LinearFunction(coefficients=1 0)
    CustomJoint aux4jnt: socket_parent_frame=cerv4_offset socket_child_frame=cerv3_offset
      Coordinate aux4jnt_r3: default_value=0 range=(-0.5759587 0.837758) clamped=false
      Coordinate aux4jnt_r1: default_value=0 range=(-0.5759587 0.5759587) clamped=false
      Coordinate aux4jnt_r2: default_value=0 range=(-0.4712389 0.4712389) clamped=false
      PhysicalOffsetFrame cerv4_offset: socket_parent=/bodyset/cerv4 translation=(0.003741686 0.002547846 0)
      PhysicalOffsetFrame cerv3_offset: socket_parent=/bodyset/cerv3 translation=(0.00240756 -0.003602127 0)
      SpatialTransform: axes_held_at_zero=(translation1 translation2 translation3)
        TransformAxis rotation1: coordinates=aux4jnt_r3 axis=(0 0 1) LinearFunction(coefficients=1 0)
        TransformAxis rotation2: coordinates=aux4jnt_r1 axis=(1 0 0) LinearFunction(coefficients=1 0)
        TransformAxis rotation3: coordinates=aux4jnt_r2 axis=(0 1 0) LinearFunction(coefficients=1 0)
    CustomJoint aux3jnt: socket_parent_frame=cerv3_offset socket_child_frame=cerv2_offset
      Coordinate aux3jnt_r3: default_value=0 range=(-0.5759587 0.837758) clamped=true
      Coordinate aux3jnt_r1: default_value=0 range=(-0.5759587 0.5759587) clamped=true
      Coordinate aux3jnt_r2: default_value=0 range=(-0.4712389 0.4712389) clamped=true
      PhysicalOffsetFrame cerv3_offset: socket_parent=/bodyset/cerv3 translation=(0.002683586 0.002020705 0)
      PhysicalOffsetFrame cerv2_offset: socket_parent=/bodyset/cerv2 translation=(0.002775595 -0.004484688 0)
      SpatialTransform: axes_held_at_zero=(translation1 translation2 translation3)
        TransformAxis rotation1: coordinates=aux3jnt_r3 axis=(0 0 1) LinearFunction(coefficients=1 0)
        TransformAxis rotation2: coordinates=aux3jnt_r1 axis=(1 0 0) LinearFunction(coefficients=1 0)
        TransformAxis rotation3: coordinates=aux3jnt_r2 axis=(0 1 0) LinearFunction(coefficients=1 0)
    CustomJoint aux2jnt: socket_parent_frame=cerv2_offset socket_child_frame=cerv1_offset
      Coordinate pitch1: default_value=0 range=(-0.2792527 0.418879) clamped=true
      Coordinate roll1: default_value=0 range=(-0.1047198 0.1047198) clamped=true
      Coordinate yaw1: default_value=0 range=(-0.6632251 0.6632251) clamped=true
      PhysicalOffsetFrame cerv2_offset: socket_parent=/bodyset/cerv2 translation=(0.003521888 0.008498144 0)
      PhysicalOffsetFrame cerv1_offset: socket_parent=/bodyset/cerv1 translation=(0.02169871 0.001405708 0)
      SpatialTransform: axes_held_at_zero=(translation1 translation2 translation3)
        TransformAxis rotation1: coordinates=pitch1 axis=(0 0 1) LinearFunction(coefficients=1 0)
        TransformAxis rotation2: coordinates=roll1 axis=(1 0 0) LinearFunction(coefficients=1 0)
        TransformAxis rotation3: coordinates=yaw1 axis=(0 1 0) LinearFunction(coefficients=1 0)
    CustomJoint aux1jnt: socket_parent_frame=cerv1_offset socket_child_frame=skull_offset
      Coordinate aux1jnt_r3: default_value=0 range=(-0.2792527 0.418879) clamped=true
      Coordinate aux1jnt_r1: default_value=0 range=(-0.1047198 0.1047198) clamped=true
      Coordinate aux1jnt_r2: default_value=0 range=(-0.6632251 0.6632251) clamped=true
      PhysicalOffsetFrame cerv1_offset: socket_parent=/bodyset/cerv1 translation=(0.02215876 0.005958285 0)
      PhysicalOffsetFrame skull_offset: socket_parent=/bodyset/skull translation=(0 0 0)
      SpatialTransform: axes_held_at_zero=(translation1 translation2 translation3)
        TransformAxis rotation1: coordinates=aux1jnt_r3 axis=(0 0 1) LinearFunction(coefficients=1 0)
        TransformAxis rotation2: coordinates=aux1jnt_r1 axis=(1 0 0) LinearFunction(coefficients=1 0)
        TransformAxis rotation3: coordinates=aux1jnt_r2 axis=(0 1 0) LinearFunction(coefficients=1 0)
    WeldJoint jawjnt: socket_parent_frame=skull_offset socket_child_frame=jaw_offset
      PhysicalOffsetFrame skull_offset: socket_parent=/bodyset/skull translation=(0 0 0)
      PhysicalOffsetFrame jaw_offset: socket_parent=/bodyset/jaw translation=(0 0 0)
  ConstraintSet:
    CoordinateCouplerConstraint aux7jnt_r1_con: isEnforced=false independent_coordinate_names=roll2
        dependent_coordinate_name=aux7jnt_r1
      coupled_coordinates_function: SimmSpline: x=(-1.74533 1.74533) y=(-0.23911 0.23911)
    CoordinateCouplerConstraint aux7jnt_r2_con: isEnforced=false independent_coordinate_names=yaw2
        dependent_coordinate_name=aux7jnt_r2
      coupled_coordinates_function: SimmSpline: x=(-1.74533 1.74533) y=(-0.328122 0.328122)
    CoordinateCouplerConstraint aux7jnt_r3_con: isEnforced=false independent_coordinate_names=pitch2
        dependent_coordinate_name=aux7jnt_r3
      coupled_coordinates_function: SimmSpline: x=(-1.74533 1.74533) y=(-0.326377 0.326377)
    CoordinateCouplerConstraint aux6jnt_r1_con: isEnforced=false independent_coordinate_names=roll2
        dependent_coordinate_name=aux6jnt_r1
      coupled_coordinates_function: SimmSpline: x=(-1.74533 1.74533) y=(-0.274017 0.274017)
    CoordinateCouplerConstraint aux6jnt_r2_con: isEnforced=false independent_coordinate_names=yaw2
        dependent_coordinate_name=aux6jnt_r2
      coupled_coordinates_function: SimmSpline: x=(-1.74533 1.74533) y=(-0.382227 0.382227)
    CoordinateCouplerConstraint aux6jnt_r3_con: isEnforced=false independent_coordinate_names=pitch2
        dependent_coordinate_name=aux6jnt_r3
      coupled_coordinates_function: SimmSpline: x=(-1.74533 1.74533) y=(-0.383972 0.383972)
    CoordinateCouplerConstraint aux5jnt_r1_con: isEnforced=false independent_coordinate_names=roll2
        dependent_coordinate_name=aux5jnt_r1
      coupled_coordinates_function: SimmSpline: x=(-1.74533 1.74533) y=(-0.376991 0.376991)
    CoordinateCouplerConstraint aux5jnt_r2_con: isEnforced=false independent_coordinate_names=yaw2
        dependent_coordinate_name=aux5jnt_r2
      coupled_coordinates_function: SimmSpline: x=(-1.74533 1.74533) y=(-0.382227 0.382227)
    CoordinateCouplerConstraint aux5jnt_r3_con: isEnforced=false independent_coordinate_names=pitch2
        dependent_coordinate_name=aux5jnt_r3
      coupled_coordinates_function: SimmSpline: x=(-1.74533 1.74533) y=(-0.383972 0.383972)
    CoordinateCouplerConstraint aux4jnt_r1_con: isEnforced=false independent_coordinate_names=roll2
        dependent_coordinate_name=aux4jnt_r1
      coupled_coordinates_function: SimmSpline: x=(-1.74533 1.74533) y=(-0.376991 0.376991)
    CoordinateCouplerConstraint aux4jnt_r2_con: isEnforced=false independent_coordinate_names=yaw2
        dependent_coordinate_name=aux4jnt_r2
      coupled_coordinates_function: SimmSpline: x=(-1.74533 1.74533) y=(-0.382227 0.382227)
    CoordinateCouplerConstraint aux4jnt_r3_con: isEnforced=false independent_coordinate_names=pitch2
        dependent_coordinate_name=aux4jnt_r3
      coupled_coordinates_function: SimmSpline: x=(-1.74533 1.74533) y=(-0.287979 0.287979)
    CoordinateCouplerConstraint aux3jnt_r1_con: isEnforced=false independent_coordinate_names=roll2
        dependent_coordinate_name=aux3jnt_r1
      coupled_coordinates_function: SimmSpline: x=(-1.74533 1.74533) y=(-0.342085 0.342085)
    CoordinateCouplerConstraint aux3jnt_r2_con: isEnforced=false independent_coordinate_names=yaw2
        dependent_coordinate_name=aux3jnt_r2
      coupled_coordinates_function: SimmSpline: x=(-1.74533 1.74533) y=(-0.164061 0.164061)
    CoordinateCouplerConstraint aux3jnt_r3_con: isEnforced=false independent_coordinate_names=pitch2
        dependent_coordinate_name=aux3jnt_r3
      coupled_coordinates_function: SimmSpline: x=(-1.74533 1.74533) y=(-0.191986 0.191986)
    CoordinateCouplerConstraint aux1jnt_r1_con: isEnforced=false independent_coordinate_names=roll1
        dependent_coordinate_name=aux1jnt_r1
      coupled_coordinates_function: SimmSpline: x=(-1.74533 1.74533) y=(-0.872665 0.872665)
    CoordinateCouplerConstraint aux1jnt_r2_con: isEnforced=false independent_coordinate_names=yaw1
        dependent_coordinate_name=aux1jnt_r2
      coupled_coordinates_function: SimmSpline: x=(-1.74533 1.74533) y=(-0.193732 0.193732)
    CoordinateCouplerConstraint aux1jnt_r3_con: isEnforced=false independent_coordinate_names=pitch1
        dependent_coordinate_name=aux1jnt_r3
      coupled_coordinates_function: SimmSpline: x=(-1.74533 1.74533) y=(-0.970403 0.970403)
  ForceSet:
    PointActuator Skull_Impact: appliesForce=false min_control=1 max_control=1 body=skull point=(0 0.2 0)
        direction=(0 0 1) force_is_global=true optimal_force=150
    TorqueActuator Skull_Moment: appliesForce=false min_control=1 max_control=1 bodyA=skull bodyB=ground
        torque_is_global=true axis=(0 1 0) optimal_force=20
    Millard2012EquilibriumMuscle [values shared by the 72 below unless stated]:
      ActiveForceLengthCurve: min_norm_active_fiber_length=0.4441 transition_norm_fiber_length=0.73
          max_norm_active_fiber_length=1.8123 shallow_ascending_slope=0.8616 minimum_value=0
      ForceVelocityCurve: concentric_slope_at_vmax=0 concentric_slope_near_vmax=0.25 isometric_slope=5
          eccentric_slope_at_vmax=0 eccentric_slope_near_vmax=0.15 max_eccentric_velocity_force_multiplier=1.4
          concentric_curviness=0.6 eccentric_curviness=0.9
      FiberForceLengthCurve
      TendonForceLengthCurve
    Millard2012EquilibriumMuscle digastric_post: max_isometric_force=109.62 optimal_fiber_length=0.009401314
        tendon_slack_length=0.01565388 pennation_angle_at_optimal=0.2496 [radians] minimum_activation=0.01
      PathPoint digastricpost-P1: skull (-0.003108808 0.00138145 0.032651)
      PathPoint digastricpost-P2: cerv3 (0.01186401 0.002384113 0.02001034)
    Millard2012EquilibriumMuscle digastric_ant: max_isometric_force=109.62 optimal_fiber_length=0.007370401
        tendon_slack_length=0.002595212 pennation_angle_at_optimal=0 minimum_activation=0.01
      PathPoint digastricpost-P1: skull (0.01544211 -0.02612566 0.01184198)
      PathPoint digastricpost-P2: cerv1 (0.0372584 -0.02299451 0.003974178)
    Millard2012EquilibriumMuscle Geniohyoid: max_isometric_force=91.665 optimal_fiber_length=0.01684553
        tendon_slack_length=0.002661889 pennation_angle_at_optimal=0 minimum_activation=0.01
      PathPoint digastricpost-P1: cerv1 (0.03666536 -0.02148122 0.00355196)
      PathPoint digastricpost-P2: skull (0.03521617 -0.02734458 0.001095212)
    Millard2012EquilibriumMuscle Mylohyoid_Post: max_isometric_force=50.085 optimal_fiber_length=0.01463106
        tendon_slack_length=0.007270593 pennation_angle_at_optimal=0 minimum_activation=0.01
      PathPoint digastricpost-P1: cerv1 (0.03846474 -0.02231562 0.002161395)
      PathPoint digastricpost-P2: skull (0.02104816 -0.01580541 0.01991916)
    Millard2012EquilibriumMuscle Mylohyoid_Ant: max_isometric_force=150.255 optimal_fiber_length=0.01111699
        tendon_slack_length=0.001523028 pennation_angle_at_optimal=0 default_fiber_length=0.1 minimum_activation=0.01
      PathPoint digastricpost-P1: cerv1 (0.04971024 -0.0226351 -0.002161395)
      PathPoint digastricpost-P2: skull (0.0295082 -0.02421601 0.01081522)
    Millard2012EquilibriumMuscle Stylohyoid_Lat: max_isometric_force=18.41786 optimal_fiber_length=0.008010873
        tendon_slack_length=0.02180982 pennation_angle_at_optimal=0.082 minimum_activation=0.01
      PathPoint digastricpost-P1: skull (0.00575894 -0.0003250471 0.02573747)
      PathPoint digastricpost-P2: cerv1 (0.03288702 -0.01984093 0.01076514)
    Millard2012EquilibriumMuscle Stylohyoid_Med: max_isometric_force=18.41786 optimal_fiber_length=0.008072814
        tendon_slack_length=0.01935014 pennation_angle_at_optimal=0.08203 minimum_activation=0.01
      PathPoint digastricpost-P1: skull (0.00601376 -0.0008126176 0.02573747)
      PathPoint digastricpost-P2: cerv1 (0.03233906 -0.01799218 0.01133136)
    Millard2012EquilibriumMuscle Sterno_hyoid: max_isometric_force=54.81 optimal_fiber_length=0.03117475
        tendon_slack_length=0.01336061 pennation_angle_at_optimal=0 minimum_activation=0.01
      PathPoint stern_mast-P1: cerv3 (0.02935077 -0.009240933 0.004385541)
      PathPoint default: ribcage (-0.005527814 0.1231064 0.005832838)
    Millard2012EquilibriumMuscle SternoThyroid: max_isometric_force=61.425 optimal_fiber_length=0.02568266
        tendon_slack_length=0.01100686 pennation_angle_at_optimal=0 minimum_activation=0.01
      PathPoint stern_mast-P1: cerv3 (0.02066111 -0.0172359 0.009273083)
      PathPoint default: ribcage (-0.005768102 0.1204396 0.004498106)
    Millard2012EquilibriumMuscle Omo_hyoid: max_isometric_force=70.875 optimal_fiber_length=0.02001273
        tendon_slack_length=0.008576885 pennation_angle_at_optimal=0 minimum_activation=0.01
      PathPoint stern_mast-P1: cerv3 (0.02664162 -0.00555095 0.00920336)
      PathPoint default: ribcage (-0.008285221 0.1460756 0.01109533)
    Millard2012EquilibriumMuscle digastric_post_L: max_isometric_force=109.62 optimal_fiber_length=0.009401314
        tendon_slack_length=0.01565388 pennation_angle_at_optimal=0.2496 minimum_activation=0.01
      PathPoint digastricpost-P1: skull (-0.003108808 0.00138145 -0.032651)
      PathPoint digastricpost-P2: cerv3 (0.01186401 0.002384113 -0.02001034)
    Millard2012EquilibriumMuscle digastric_ant_L: max_isometric_force=109.62 optimal_fiber_length=0.007370401
        tendon_slack_length=0.002595212 pennation_angle_at_optimal=0 minimum_activation=0.01
      PathPoint digastricpost-P1: skull (0.01544211 -0.02612566 -0.01184198)
      PathPoint digastricpost-P2: cerv1 (0.0372584 -0.02299451 -0.003974178)
    Millard2012EquilibriumMuscle Geniohyoid_L: max_isometric_force=91.665 optimal_fiber_length=0.01689027
        tendon_slack_length=0.002668959 pennation_angle_at_optimal=0 minimum_activation=0.01
      PathPoint digastricpost-P1: cerv1 (0.03654518 -0.02149132 -0.004394688)
      PathPoint digastricpost-P2: skull (0.03521617 -0.02734458 -0.001095212)
    Millard2012EquilibriumMuscle Mylohyoid_Post_L: max_isometric_force=50.085 optimal_fiber_length=0.01463106
        tendon_slack_length=0.007270593 pennation_angle_at_optimal=0 minimum_activation=0.01
      PathPoint digastricpost-P1: cerv1 (0.03846474 -0.02231562 -0.002161395)
      PathPoint digastricpost-P2: skull (0.02104816 -0.01580541 -0.01991916)
    Millard2012EquilibriumMuscle Mylohyoid_Ant_L: max_isometric_force=150.255 optimal_fiber_length=0.01111699
        tendon_slack_length=0.001523028 pennation_angle_at_optimal=0 minimum_activation=0.01
      PathPoint digastricpost-P1: cerv1 (0.04971024 -0.0226351 0.002161395)
      PathPoint digastricpost-P2: skull (0.0295082 -0.02421601 -0.01081522)
    Millard2012EquilibriumMuscle Stylohyoid_Lat_L: max_isometric_force=18.41786 optimal_fiber_length=0.007958033
        tendon_slack_length=0.02166596 pennation_angle_at_optimal=0.082 minimum_activation=0.01
      PathPoint digastricpost-P1: skull (0.00575894 -0.0003250471 -0.02573747)
      PathPoint digastricpost-P2: cerv1 (0.03255175 -0.01986904 -0.01140178)
    Millard2012EquilibriumMuscle Stylohyoid_Med_L: max_isometric_force=18.41786 optimal_fiber_length=0.008015061
        tendon_slack_length=0.01921171 pennation_angle_at_optimal=0.08203 minimum_activation=0.01
      PathPoint digastricpost-P1: skull (0.00601376 -0.0008126176 -0.02573747)
      PathPoint digastricpost-P2: cerv1 (0.03198692 -0.0180217 -0.01195098)
    Millard2012EquilibriumMuscle Sterno_hyoid_L: max_isometric_force=54.81 optimal_fiber_length=0.03117475
        tendon_slack_length=0.01336061 pennation_angle_at_optimal=0 minimum_activation=0.01
      PathPoint stern_mast-P1: cerv3 (0.02935077 -0.009240933 -0.004385541)
      PathPoint default: ribcage (-0.005527814 0.1231064 -0.005832838)
    Millard2012EquilibriumMuscle SternoThyroid_L: max_isometric_force=61.425 optimal_fiber_length=0.02568266
        tendon_slack_length=0.01100686 pennation_angle_at_optimal=0 minimum_activation=0.01
      PathPoint stern_mast-P1: cerv3 (0.02066111 -0.0172359 -0.009273083)
      PathPoint default: ribcage (-0.005768102 0.1204396 -0.004498106)
    Millard2012EquilibriumMuscle Omo_hyoid_L: max_isometric_force=70.875 optimal_fiber_length=0.02001273
        tendon_slack_length=0.008576885 pennation_angle_at_optimal=0 minimum_activation=0.01
      PathPoint stern_mast-P1: cerv3 (0.02664162 -0.00555095 -0.00920336)
      PathPoint default: ribcage (-0.008285221 0.1460756 -0.01109533)
    Millard2012EquilibriumMuscle stern_mast: max_isometric_force=186.165 optimal_fiber_length=0.04780571
        tendon_slack_length=0.02484259 pennation_angle_at_optimal=0.2617994 minimum_activation=0.01
      PathPoint P1: ribcage (-0.0002757407 0.1287709 0.002822341)
      PathPoint P2: skull (-0.002599168 0.00281572 0.04401382)
    Millard2012EquilibriumMuscle stern_mast_L: max_isometric_force=186.165 optimal_fiber_length=0.04780571
        tendon_slack_length=0.02484259 pennation_angle_at_optimal=0.2617994 minimum_activation=0.01
      PathPoint P1: ribcage (-0.0002757407 0.1287709 -0.002822341)
      PathPoint P2: skull (-0.002599168 0.00281572 -0.04401382)
    Millard2012EquilibriumMuscle cleid_mast: max_isometric_force=93.0825 optimal_fiber_length=0.04677983
        tendon_slack_length=0.01524589 pennation_angle_at_optimal=0.2617994 minimum_activation=0.01
      PathPoint P1: rclavicle (0.001528391 0.002135021 0.01034858)
      PathPoint P2: skull (-0.002599168 0.00281572 0.04401382)
    Millard2012EquilibriumMuscle cleid_mast_L: max_isometric_force=93.0825 optimal_fiber_length=0.04677983
        tendon_slack_length=0.01524589 pennation_angle_at_optimal=0.2617994 minimum_activation=0.01
      PathPoint P1: lclavicle (0.001528391 0.002135021 -0.01034858)
      PathPoint P2: skull (-0.002599168 0.00281572 -0.04401382)
    Millard2012EquilibriumMuscle cleid_occ: max_isometric_force=93.0825 optimal_fiber_length=0.04651634
        tendon_slack_length=0.02991992 pennation_angle_at_optimal=0.2617994 minimum_activation=0.01
      PathPoint P1: rclavicle (0.001528391 0.002135021 0.01034858)
      PathPoint P2: skull (-0.01783742 0.009345103 0.04545128)
    Millard2012EquilibriumMuscle cleid_occ_L: max_isometric_force=93.0825 optimal_fiber_length=0.04651634
        tendon_slack_length=0.02991992 pennation_angle_at_optimal=0.2617994 minimum_activation=0.01
      PathPoint P1: lclavicle (0.001528391 0.002135021 -0.01034858)
      PathPoint P2: skull (-0.01783742 0.009345103 -0.04545128)
    Millard2012EquilibriumMuscle scalenus_ant: max_isometric_force=138.915 optimal_fiber_length=0.01589849
        tendon_slack_length=0.02022174 pennation_angle_at_optimal=0.1745329 minimum_activation=0.01
      PathPoint P1: ribcage (-0.008425848 0.1309611 0.01555227)
      PathPoint P2: cerv4 (0.003644566 0.003154856 0.01619652)
    Millard2012EquilibriumMuscle scalenus_ant_L: max_isometric_force=138.915 optimal_fiber_length=0.01589849
        tendon_slack_length=0.02022174 pennation_angle_at_optimal=0.1745329 minimum_activation=0.01
      PathPoint P1: ribcage (-0.008425848 0.1309611 -0.01555227)
      PathPoint P2: cerv4 (0.003644566 0.003154856 -0.01619652)
    Millard2012EquilibriumMuscle scalenus_med: max_isometric_force=100.94 optimal_fiber_length=0.01857046
        tendon_slack_length=0.02284463 pennation_angle_at_optimal=0.1745329 minimum_activation=0.01
      PathPoint P1: ribcage (-0.01338524 0.1352429 0.01843341)
      PathPoint P2: cerv3 (-0.004610657 0.003917613 0.01477418)
    Millard2012EquilibriumMuscle scalenus_med_L: max_isometric_force=100.94 optimal_fiber_length=0.01857046
        tendon_slack_length=0.02284463 pennation_angle_at_optimal=0.1745329 minimum_activation=0.01
      PathPoint P1: ribcage (-0.01338524 0.1352429 -0.01843341)
      PathPoint P2: cerv3 (-0.004610657 0.003917613 -0.01477418)
    Millard2012EquilibriumMuscle scalenus_post: max_isometric_force=76.93 optimal_fiber_length=0.02040347
        tendon_slack_length=0.02397243 pennation_angle_at_optimal=0.1745329 minimum_activation=0.01
      PathPoint P1: ribcage (-0.01433064 0.1231773 0.03122214)
      PathPoint P2: cerv5 (-0.00163571 0.005475073 0.01791866)
    Millard2012EquilibriumMuscle scalenus_post_L: max_isometric_force=76.93 optimal_fiber_length=0.02040347
        tendon_slack_length=0.02397243 pennation_angle_at_optimal=0.1745329 minimum_activation=0.01
      PathPoint P1: ribcage (-0.01433064 0.1231773 -0.03122214)
      PathPoint P2: cerv5 (-0.00163571 0.005475073 -0.01791866)
    Millard2012EquilibriumMuscle long_cap_sklc4: max_isometric_force=89.964 optimal_fiber_length=0.01689961
        tendon_slack_length=0.01836587 pennation_angle_at_optimal=0.08726646 minimum_activation=0.01
      PathPoint P1: cerv4 (0.003332759 0.004648421 0.01687283)
      PathPoint P2: cerv3 (0.006118577 0.00402943 0.01322634)
      PathPoint P3: cerv2 (0.00879194 0.003310602 0.010298)
      PathPoint P4: cerv1 (0.02973925 0.001233988 0.008080829)
      PathPoint P5: skull (0.004994479 0.006484689 0.002464226)
    Millard2012EquilibriumMuscle long_cap_sklc4_L: max_isometric_force=89.964 optimal_fiber_length=0.01689961
        tendon_slack_length=0.01836587 pennation_angle_at_optimal=0.08726646 minimum_activation=0.01
      PathPoint P1: cerv4 (0.003332759 0.004648421 -0.01687283)
      PathPoint P2: cerv3 (0.006118577 0.00402943 -0.01322634)
      PathPoint P3: cerv2 (0.00879194 0.003310602 -0.010298)
      PathPoint P4: cerv1 (0.02973925 0.001233988 -0.008080829)
      PathPoint P5: skull (0.004994479 0.006484689 -0.002464226)
    Millard2012EquilibriumMuscle long_col_c1thx: max_isometric_force=32.319 optimal_fiber_length=0.03601124
        tendon_slack_length=0.03536035 pennation_angle_at_optimal=0.08726646 minimum_activation=0.01
      PathPoint P1: spine (-0.01925458 0.1194903 0.001087777)
      PathPoint P2: cerv7 (0.0118589 0.0004392838 0.002788897)
      PathPoint P3: cerv6 (0.01182823 0.0009224959 0.002802842)
      PathPoint P4: cerv5 (0.01138863 0.0009105155 0.002719175)
      PathPoint P5: cerv4 (0.01127106 0.001321845 0.00264248)
      PathPoint P6: cerv3 (0.01130684 0.002408074 0.002565785)
      PathPoint P7: cerv2 (0.0108468 0.003885665 0.002482118)
      PathPoint P8: cerv1 (0.02977503 0.001924862 0.002161395)
    Millard2012EquilibriumMuscle long_col_c1thx_L: max_isometric_force=32.319 optimal_fiber_length=0.03601124
        tendon_slack_length=0.03536035 pennation_angle_at_optimal=0.08726646 minimum_activation=0.01
      PathPoint P1: spine (-0.01925458 0.1194903 -0.001087777)
      PathPoint P2: cerv7 (0.0118589 0.0004392838 -0.002788897)
      PathPoint P3: cerv6 (0.01182823 0.0009224959 -0.002802842)
      PathPoint P4: cerv5 (0.01138863 0.0009105155 -0.002719175)
      PathPoint P5: cerv4 (0.01127106 0.001321845 -0.00264248)
      PathPoint P6: cerv3 (0.01130684 0.002408074 -0.002565785)
      PathPoint P7: cerv2 (0.0108468 0.003885665 -0.002482118)
      PathPoint P8: cerv1 (0.02977503 0.001924862 -0.002161395)
    Millard2012EquilibriumMuscle long_col_c1c5: max_isometric_force=32.319 optimal_fiber_length=0.01573214
        tendon_slack_length=0.01543388 pennation_angle_at_optimal=0.08726646 minimum_activation=0.01
      PathPoint P1: cerv5 (0.003419656 0.003550212 0.01659394)
      PathPoint P2: cerv4 (0.005730096 0.002991123 0.01443254)
      PathPoint P3: cerv2 (0.00888906 0.0006349647 0.009517111)
      PathPoint P4: cerv1 (0.02926387 0.001924862 0.00432279)
    Millard2012EquilibriumMuscle long_col_c1c5_L: max_isometric_force=32.319 optimal_fiber_length=0.01573214
        tendon_slack_length=0.01543388 pennation_angle_at_optimal=0.08726646 minimum_activation=0.01
      PathPoint P1: cerv5 (0.003419656 0.003550212 -0.01659394)
      PathPoint P2: cerv4 (0.005730096 0.002991123 -0.01443254)
      PathPoint P3: cerv2 (0.00888906 0.0006349647 -0.009517111)
      PathPoint P4: cerv1 (0.02926387 0.001924862 -0.00432279)
    Millard2012EquilibriumMuscle long_col_c5thx: max_isometric_force=32.319 optimal_fiber_length=0.02505353
        tendon_slack_length=0.02384132 pennation_angle_at_optimal=0.08726646 minimum_activation=0.01
      PathPoint P1: spine (-0.01962092 0.1193406 0.001999158)
      PathPoint P2: spine (-0.01900641 0.1261593 0.003004617)
      PathPoint P3: spine (-0.01798617 0.1318159 0.003930697)
      PathPoint P4: spine (-0.01759226 0.1353493 0.004433427)
      PathPoint P5: spine (-0.01669807 0.1409547 0.00522721)
      PathPoint P6: cerv7 (0.00567898 0.00291924 0.01379807)
      PathPoint P7: cerv6 (0.004912241 0.002847358 0.01545049)
      PathPoint P8: cerv5 (0.003419656 0.003550212 0.01659394)
    Millard2012EquilibriumMuscle long_col_c5thx_L: max_isometric_force=32.319 optimal_fiber_length=0.02505353
        tendon_slack_length=0.02384132 pennation_angle_at_optimal=0.08726646 minimum_activation=0.01
      PathPoint P1: spine (-0.01962092 0.1193406 -0.001999158)
      PathPoint P2: spine (-0.01900641 0.1261593 -0.003004617)
      PathPoint P3: spine (-0.01798617 0.1318159 -0.003930697)
      PathPoint P4: spine (-0.01759226 0.1353493 -0.004433427)
      PathPoint P5: spine (-0.01669807 0.1409547 -0.00522721)
      PathPoint P6: cerv7 (0.00567898 0.00291924 -0.01379807)
      PathPoint P7: cerv6 (0.004912241 0.002847358 -0.01545049)
      PathPoint P8: cerv5 (0.003419656 0.003550212 -0.01659394)
    Millard2012EquilibriumMuscle trap_cl: max_isometric_force=108.64 optimal_fiber_length=0.03165218
        tendon_slack_length=0.04492423 pennation_angle_at_optimal=0.5235988 minimum_activation=0.01
      PathPoint P1: rclavicle (-0.01158111 0.009138835 0.02554806)
      PathPoint P2: skull (-0.04092924 0.01058028 0.009062877)
    Millard2012EquilibriumMuscle trap_cl_L: max_isometric_force=108.64 optimal_fiber_length=0.03165218
        tendon_slack_length=0.04492423 pennation_angle_at_optimal=0.5235988 minimum_activation=0.01
      PathPoint P1: lclavicle (-0.01158111 0.009138835 -0.02554806)
      PathPoint P2: skull (-0.04092924 0.01058028 -0.009062877)
    Millard2012EquilibriumMuscle trap_acr: max_isometric_force=527.73 optimal_fiber_length=0.02826782
        tendon_slack_length=0.0235305 pennation_angle_at_optimal=0 minimum_activation=0.01
      PathPoint P1: rscapula (-0.009371245 -0.003608264 -0.002163795)
      PathPoint P2: cerv7 (-0.0243823 0.007587629 0.002126534)
    Millard2012EquilibriumMuscle trap_acr_L: max_isometric_force=527.73 optimal_fiber_length=0.02826782
        tendon_slack_length=0.0235305 pennation_angle_at_optimal=0 minimum_activation=0.01
      PathPoint P1: lscapula (-0.009371245 -0.003608264 0.002163795)
      PathPoint P2: cerv7 (-0.0243823 0.007587629 -0.002126534)
    Millard2012EquilibriumMuscle splen_cap_sklc6: max_isometric_force=69.314 optimal_fiber_length=0.04219834
        tendon_slack_length=0.01155479 pennation_angle_at_optimal=0 minimum_activation=0.01
      PathPoint P1: cerv6 (-0.02484234 0.006577276 0.002126534)
      PathPoint P2: skull (-0.03141425 0.007793003 0.03011832)
    Millard2012EquilibriumMuscle splen_cap_sklc6_L: max_isometric_force=69.314 optimal_fiber_length=0.04219834
        tendon_slack_length=0.01155479 pennation_angle_at_optimal=0 minimum_activation=0.01
      PathPoint P1: cerv6 (-0.02484234 0.006577276 -0.002126534)
      PathPoint P2: skull (-0.03141425 0.007793003 -0.03011832)
    Millard2012EquilibriumMuscle splen_cap_sklthx: max_isometric_force=69.314 optimal_fiber_length=0.04100816
        tendon_slack_length=0.03533652 pennation_angle_at_optimal=0 minimum_activation=0.01
      PathPoint P1: spine (-0.04090417 0.1335452 0.0008819815)
      PathPoint P2: skull (-0.02046717 0.004469397 0.03712083)
    Millard2012EquilibriumMuscle splen_cap_sklthx_L: max_isometric_force=69.314 optimal_fiber_length=0.04100816
        tendon_slack_length=0.03533652 pennation_angle_at_optimal=0 minimum_activation=0.01
      PathPoint P1: spine (-0.04090417 0.1335452 -0.0008819815)
      PathPoint P2: skull (-0.02046717 0.004469397 -0.03712083)
    Millard2012EquilibriumMuscle splen_cerv_c3thx: max_isometric_force=69.314 optimal_fiber_length=0.03811701
        tendon_slack_length=0.04350876 pennation_angle_at_optimal=0 minimum_activation=0.01
      PathPoint P1: spine (-0.05061024 0.1032925 0.001205375)
      PathPoint P2: cerv3 (-0.004022824 0.004013456 0.01648935)
    Millard2012EquilibriumMuscle splen_cerv_c3thx_L: max_isometric_force=69.314 optimal_fiber_length=0.03811701
        tendon_slack_length=0.04350876 pennation_angle_at_optimal=0 minimum_activation=0.01
      PathPoint P1: spine (-0.05061024 0.1032925 -0.001205375)
      PathPoint P2: cerv3 (-0.004022824 0.004013456 -0.01648935)
    Millard2012EquilibriumMuscle semi_cap_sklc5: max_isometric_force=89.67 optimal_fiber_length=0.02893652
        tendon_slack_length=0.01981386 pennation_angle_at_optimal=0.08726646 minimum_activation=0.01
      PathPoint P1: cerv5 (-0.004758893 0.004608486 0.01638477)
      PathPoint P2: skull (-0.03792236 0.008126176 0.01232113)
    Millard2012EquilibriumMuscle semi_cap_sklc5_L: max_isometric_force=89.67 optimal_fiber_length=0.02893652
        tendon_slack_length=0.01981386 pennation_angle_at_optimal=0.08726646 minimum_activation=0.01
      PathPoint P1: cerv5 (-0.004758893 0.004608486 -0.01638477)
      PathPoint P2: skull (-0.03792236 0.008126176 -0.01232113)
    Millard2012EquilibriumMuscle semi_cap_sklthx: max_isometric_force=89.67 optimal_fiber_length=0.02711029
        tendon_slack_length=0.02746512 pennation_angle_at_optimal=0.08726646 minimum_activation=0.01
      PathPoint P1: spine (-0.03363643 0.1486321 0.01020159)
      PathPoint P2: skull (-0.03909454 0.008126176 0.007598031)
    Millard2012EquilibriumMuscle semi_cap_sklthx_L: max_isometric_force=89.67 optimal_fiber_length=0.02711029
        tendon_slack_length=0.02746512 pennation_angle_at_optimal=0.08726646 minimum_activation=0.01
      PathPoint P1: spine (-0.03363643 0.1486321 -0.01020159)
      PathPoint P2: skull (-0.03909454 0.008126176 -0.007598031)
    Millard2012EquilibriumMuscle semi_cerv_c3thx: max_isometric_force=89.67 optimal_fiber_length=0.02637784
        tendon_slack_length=0.01061863 pennation_angle_at_optimal=0.08726646 minimum_activation=0.01
      PathPoint P1: spine (-0.03504271 0.1378585 0.007664419)
      PathPoint P2: cerv3 (-0.02077351 -0.001285903 0.001673338)
    Millard2012EquilibriumMuscle semi_cerv_c3thx_L: max_isometric_force=89.67 optimal_fiber_length=0.02637784
        tendon_slack_length=0.01061863 pennation_angle_at_optimal=0.08726646 minimum_activation=0.01
      PathPoint P1: spine (-0.03504271 0.1378585 -0.007664419)
      PathPoint P2: cerv3 (-0.02077351 -0.001285903 -0.001673338)
    Millard2012EquilibriumMuscle levator_scap: max_isometric_force=106.82 optimal_fiber_length=0.04274129
        tendon_slack_length=0.008274033 pennation_angle_at_optimal=0 minimum_activation=0.01
      PathPoint P1: rscapula (-0.0384028 -0.01427549 -0.02394874)
      PathPoint P2: cerv2 (-0.006062349 0.002895279 0.01478813)
    Millard2012EquilibriumMuscle levator_scap_L: max_isometric_force=106.82 optimal_fiber_length=0.04274129
        tendon_slack_length=0.008274033 pennation_angle_at_optimal=0 minimum_activation=0.01
      PathPoint P1: lscapula (-0.0384028 -0.01427549 0.02394874)
      PathPoint P2: cerv2 (-0.006062349 0.002895279 -0.01478813)
    Millard2012EquilibriumMuscle longissi_cap_sklc6: max_isometric_force=43.652 optimal_fiber_length=0.03042229
        tendon_slack_length=0.01013907 pennation_angle_at_optimal=0 minimum_activation=0.01
      PathPoint P1: cerv6 (-0.004176172 0.006050136 0.01923642)
      PathPoint P2: skull (-0.01753164 0.002072175 0.0376479)
    Millard2012EquilibriumMuscle longissi_cap_sklc6_L: max_isometric_force=43.652 optimal_fiber_length=0.03042229
        tendon_slack_length=0.01013907 pennation_angle_at_optimal=0 minimum_activation=0.01
      PathPoint P1: cerv6 (-0.004176172 0.006050136 -0.01923642)
      PathPoint P2: skull (-0.01753164 0.002072175 -0.0376479)
    Millard2012EquilibriumMuscle longissi_cerv_c4thx: max_isometric_force=28.07 optimal_fiber_length=0.05347851
        tendon_slack_length=0.01717351 pennation_angle_at_optimal=0 minimum_activation=0.01
      PathPoint P1: spine (-0.04330705 0.1086655 0.009451902)
      PathPoint P2: spine (-0.04300767 0.1191121 0.008940352)
      PathPoint P3: spine (-0.03930487 0.1287788 0.00858168)
      PathPoint P4: spine (-0.03202531 0.1469304 0.008202428)
      PathPoint P5: cerv4 (-0.00362412 0.004620467 0.01819755)
    Millard2012EquilibriumMuscle longissi_cerv_c4thx_L: max_isometric_force=28.07 optimal_fiber_length=0.05347851
        tendon_slack_length=0.01717351 pennation_angle_at_optimal=0 minimum_activation=0.01
      PathPoint P1: spine (-0.04330705 0.1086655 -0.009451902)
      PathPoint P2: spine (-0.04300767 0.1191121 -0.008940352)
      PathPoint P3: spine (-0.03930487 0.1287788 -0.00858168)
      PathPoint P4: spine (-0.03202531 0.1469304 -0.008202428)
      PathPoint P5: cerv4 (-0.00362412 0.004620467 -0.01819755)
    Millard2012EquilibriumMuscle iliocost_cerv_c5rib: max_isometric_force=28.07 optimal_fiber_length=0.03155803
        tendon_slack_length=0.01002819 pennation_angle_at_optimal=0 minimum_activation=0.01
      PathPoint P1: spine (-0.0407663 0.1291924 0.01566987)
      PathPoint P2: spine (-0.03298647 0.1482618 0.01186265)
      PathPoint P3: cerv5 (-0.004804898 0.005023809 0.01812783)
    Millard2012EquilibriumMuscle iliocost_cerv_c5rib_L: max_isometric_force=28.07 optimal_fiber_length=0.03155803
        tendon_slack_length=0.01002819 pennation_angle_at_optimal=0 minimum_activation=0.01
      PathPoint P1: spine (-0.0407663 0.1291924 -0.01566987)
      PathPoint P2: spine (-0.03298647 0.1482618 -0.01186265)
      PathPoint P3: cerv5 (-0.004804898 0.005023809 -0.01812783)
    Millard2012EquilibriumMuscle rectcap_post_maj: max_isometric_force=45.668 optimal_fiber_length=0.01677609
        tendon_slack_length=0.01035221 pennation_angle_at_optimal=0.08726646 minimum_activation=0.01
      PathPoint P1: cerv2 (-0.01859086 -0.002583787 0.001673338)
      PathPoint P2: skull (-0.0307823 0.003656779 0.01574367)
    Millard2012EquilibriumMuscle rectcap_post_maj_L: max_isometric_force=45.668 optimal_fiber_length=0.01677609
        tendon_slack_length=0.01035221 pennation_angle_at_optimal=0.08726646 minimum_activation=0.01
      PathPoint P1: cerv2 (-0.01859086 -0.002583787 -0.001673338)
      PathPoint P2: skull (-0.0307823 0.003656779 -0.01574367)
    Millard2012EquilibriumMuscle rectcap_post_min: max_isometric_force=25.088 optimal_fiber_length=0.00896267
        tendon_slack_length=0.007970644 pennation_angle_at_optimal=0.08726646 minimum_activation=0.01
      PathPoint P1: cerv1 (3.578115e-5 0.000359414 0.004253068)
      PathPoint P2: skull (-0.03399303 0.003656779 0.009925356)
    Millard2012EquilibriumMuscle rectcap_post_min_L: max_isometric_force=25.088 optimal_fiber_length=0.00896267
        tendon_slack_length=0.007970644 pennation_angle_at_optimal=0.08726646 minimum_activation=0.01
      PathPoint P1: cerv1 (3.578115e-5 0.000359414 -0.004253068)
      PathPoint P2: skull (-0.03399303 0.003656779 -0.009925356)
    Millard2012EquilibriumMuscle obl_cap_sup: max_isometric_force=51.107 optimal_fiber_length=0.01236452
        tendon_slack_length=0.01009785 pennation_angle_at_optimal=0.1745329 minimum_activation=0.01
      PathPoint P1: cerv1 (0.01791613 0.001537493 0.02928342)
      PathPoint P2: skull (-0.0242487 0.003782735 0.02613449)
    Millard2012EquilibriumMuscle obl_cap_sup_L: max_isometric_force=51.107 optimal_fiber_length=0.01236452
        tendon_slack_length=0.01009785 pennation_angle_at_optimal=0.1745329 minimum_activation=0.01
      PathPoint P1: cerv1 (0.01791613 0.001537493 -0.02928342)
      PathPoint P2: skull (-0.0242487 0.003782735 -0.02613449)
    Millard2012EquilibriumMuscle obl_cap_inf: max_isometric_force=63.406 optimal_fiber_length=0.02149835
        tendon_slack_length=0.008829598 pennation_angle_at_optimal=0 minimum_activation=0.01
      PathPoint P1: cerv2 (-0.01859086 -0.002583787 0.003813817)
      PathPoint P2: cerv1 (0.01531433 0.001393728 0.02643177)
    Millard2012EquilibriumMuscle obl_cap_inf_L: max_isometric_force=63.406 optimal_fiber_length=0.02149835
        tendon_slack_length=0.008829598 pennation_angle_at_optimal=0 minimum_activation=0.01
      PathPoint P1: cerv2 (-0.01859086 -0.002583787 -0.003813817)
      PathPoint P2: cerv1 (0.01531433 0.001393728 -0.02643177)
    BushingForce [values shared by the 8 below unless stated]: appliesForce=false translational_stiffness=(0 0 0) [N/m]
        translational_damping=(0 0 0) [N/(m/s)]
    BushingForce Spine_C7_Bushing: socket_frame1=/bodyset/spine socket_frame2=/bodyset/cerv7
        rotational_stiffness=(27.5 13.75 27.5) [Nm/rad] rotational_damping=(2.75 1.375 2.75) [Nm/(rad/s)]
    BushingForce C7_C6_Bushing: socket_frame1=/bodyset/cerv7 socket_frame2=/bodyset/cerv6
        rotational_stiffness=(27.5 13.75 27.5) rotational_damping=(2.75 1.375 2.75)
    BushingForce C6_C5_Bushing: socket_frame1=/bodyset/cerv6 socket_frame2=/bodyset/cerv5
        rotational_stiffness=(27.5 13.75 27.5) rotational_damping=(2.75 1.375 2.75)
    BushingForce C5_C4_Bushing: socket_frame1=/bodyset/cerv5 socket_frame2=/bodyset/cerv4
        rotational_stiffness=(23.2 11.6 23.2) rotational_damping=(2.32 1.16 2.32)
    BushingForce C4_C3_Bushing: socket_frame1=/bodyset/cerv4 socket_frame2=/bodyset/cerv3
        rotational_stiffness=(23.2 11.6 23.2) rotational_damping=(2.32 1.16 2.32)
    BushingForce C3_C2_Bushing: socket_frame1=/bodyset/cerv3 socket_frame2=/bodyset/cerv2
        rotational_stiffness=(7.8 3.9 7.8) rotational_damping=(0.78 0.39 0.78)
    BushingForce C2_C1_Bushing: socket_frame1=/bodyset/cerv2 socket_frame2=/bodyset/cerv1
        rotational_stiffness=(7.8 3.9 7.8) rotational_damping=(0.78 0.39 0.78)
    BushingForce C1_skull_Bushing: socket_frame1=/bodyset/cerv1 socket_frame2=/bodyset/skull
        rotational_stiffness=(7.8 3.9 7.8) rotational_damping=(0.78 0.39 0.78)
    ObjectGroup hyoid: members=(Sterno_hyoid Omo_hyoid SternoThyroid digastric_post digastric_ant Geniohyoid Mylohyoid_Post Mylohyoid_Ant Stylohyoid_Lat Stylohyoid_Med Sterno_hyoid_L Omo_hyoid_L SternoThyroid_L digastric_post_L digastric_ant_L Geniohyoid_L Mylohyoid_Post_L Mylohyoid_Ant_L Stylohyoid_Lat_L Stylohyoid_Med_L)
    ObjectGroup sterno: members=(cleid_mast cleid_occ stern_mast cleid_mast_L cleid_occ_L stern_mast_L)
    ObjectGroup flexion: members=(cleid_mast cleid_occ long_cap_sklc4 long_col_c1c5 long_col_c1thx long_col_c5thx scalenus_ant stern_mast cleid_mast_L cleid_occ_L long_cap_sklc4_L long_col_c1c5_L long_col_c1thx_L long_col_c5thx_L scalenus_ant_L stern_mast_L)
    ObjectGroup rotation_contra: members=(cleid_mast cleid_occ long_cap_sklc4 long_col_c1c5 obl_cap_sup semi_cap_sklc5 semi_cap_sklthx semi_cerv_c3thx stern_mast trap_acr trap_cl)
    ObjectGroup lat_bending: members=(cleid_mast cleid_occ iliocost_cerv_c5rib levator_scap long_cap_sklc4 long_col_c1c5 long_col_c1thx long_col_c5thx longissi_cap_sklc6 longissi_cerv_c4thx obl_cap_inf obl_cap_sup rectcap_post_maj scalenus_ant scalenus_med scalenus_post semi_cap_sklc5 semi_cap_sklthx semi_cerv_c3thx splen_cap_sklc6 splen_cap_sklthx splen_cerv_c3thx stern_mast trap_acr trap_cl)
    ObjectGroup scalenus: members=(scalenus_ant scalenus_med scalenus_post)
    ObjectGroup extension: members=(iliocost_cerv_c5rib levator_scap longissi_cap_sklc6 longissi_cerv_c4thx obl_cap_inf obl_cap_sup rectcap_post_maj rectcap_post_min scalenus_med scalenus_post semi_cap_sklc5 semi_cap_sklthx semi_cerv_c3thx splen_cap_sklc6 splen_cap_sklthx splen_cerv_c3thx trap_acr trap_cl)
    ObjectGroup rotation_ipsi: members=(iliocost_cerv_c5rib levator_scap long_col_c5thx longissi_cap_sklc6 longissi_cerv_c4thx obl_cap_inf rectcap_post_maj scalenus_med scalenus_post splen_cap_sklc6 splen_cap_sklthx splen_cerv_c3thx)
    ObjectGroup longus: members=(long_cap_sklc4 long_col_c1c5 long_col_c1thx long_col_c5thx)
    ObjectGroup trapezius: members=(trap_acr trap_cl)
    ObjectGroup splenius: members=(splen_cap_sklc6 splen_cap_sklthx splen_cerv_c3thx)
    ObjectGroup semispinalis: members=(semi_cap_sklc5 semi_cap_sklthx semi_cerv_c3thx)
    ObjectGroup levator_scap: members=levator_scap
    ObjectGroup erectorspinae: members=(iliocost_cerv_c5rib longissi_cap_sklc6 longissi_cerv_c4thx)
    ObjectGroup suboccipital: members=(obl_cap_inf obl_cap_sup rectcap_post_maj rectcap_post_min)
    ObjectGroup multifidus
  MarkerSet:
    Marker STERN: ribcage (0.006970789 0.1326513 -0.0005269506)
    Marker RFRO: skull (0.0479862 0.04687654 0.031465)
    Marker LFRO: skull (0.04665017 0.04681655 -0.03791348)
    Marker ROCC: skull (-0.0433636 0.05259077 0.032177)
    Marker LOCC: skull (-0.04421605 0.05318697 -0.03369972)
    Marker RSHO: rscapula (0.004188014 0.00513682 0.006423499)
    Marker LSHO: lscapula (-0.001426219 0.004884312 -0.009835781)
    Marker C1POST: cerv1 (-0.009501433 -0.004669275 -0.0002315845)
    Marker C7POST: cerv7 (-0.02915679 0.008532208 -0.0002224044)
    Marker C4R: cerv4 (0.000978609 0.002356297 0.0405486)
    Marker C4L: cerv4 (-0.001043274 0.004042532 -0.03771639)
